** Job name: Job-1 Model name: Model-1
** Generated by: Abaqus/CAE 6.14-1
**
** PARTS
**
*Node
      1,           0.,         -0.5
      2,         0.25,         -0.5
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*User element, nodes=4,type=U4, properties=3,coordinates=2, variables=600
1,2
*Element, type=U4
 1,   1,   2,  23,  22
 2,   2,   3,  24,  23
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*Nset, nset=N1, generate
   1,  105,    1
*Elset, elset=E1, generate
  1,  80,   1
*Nset, nset=top1, generate
  86,  104,    1
*Nset, nset=top
  85, 105
*Uel property, elset=E1
2.0E9,0.
** Section: Section-1
**
**
** ASSEMBLY
**
**
*Nset, nset=_PickedSet5, generate
  21,  105,   21
**
** BOUNDARY CONDITIONS
**
** Name: BC-1 Type: Displacement/Rotation
*Boundary
_PickedSet5, 1, 1
_PickedSet5, 2, 2
** ----------------------------------------------------------------
**
** STEP: Step-1
**
*Step, name=Step-1, nlgeom=NO, inc=1000
*Static
1., 1., 1e-05, 1.
**
** LOADS
**
** Name: Load-1   Type: Pressure
*Cload
top,2,-1250.
top1,2,-2500.
**
** OUTPUT REQUESTS
**
*Restart, write, frequency=0
*Output, field
*Node Output
U
*End Step
