*Node
1,5.000000,0.523841
2,5.000000,0.776220
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*User element, nodes=4,type=U4, properties=3,coordinates=2, variables=800
1,2
*Element, type=U4
10,8,1,2,9
32,161,160,158,159
40,154,153,145,146
57,9,2,3,10
*User element, nodes=5,type=U5, properties=3,coordinates=2, variables=800
1,2
*Element, type=U5
2,25,17,18,27,26
5,72,71,63,64,69
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*User element, nodes=6,type=U6, properties=3,coordinates=2, variables=800
1,2
*Element, type=U6
1,42,41,31,30,38,40
3,153,152,147,143,144,145
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*User element, nodes=7,type=U7, properties=3,coordinates=2, variables=800
1,2
*Element, type=U7
18,21,22,12,11,15,19,20
29,80,81,73,70,71,72,78
64,58,59,50,49,48,53,57
*Elset, elset=E1,generate
1,80,1
*Uel property, elset=E1
2.0E9,0.
*Nset, nset=Node, generate
1,161,1
*Nset, nset=N3
1,2,3,5,6,

*Nset, nset=c1
135,
*Nset, nset=c2
134,
*Nset, nset=c3
133,
*Nset, nset=c4
125,
*Nset, nset=c5
117,
*Nset, nset=c6
109,
*Nset, nset=c7
101,
*Nset, nset=c8
93,
*Nset, nset=c9
85,
*Nset, nset=c10
77,
*Nset, nset=c11
69,
*Nset, nset=c12
64,
*Nset, nset=c13
56,
*Nset, nset=c14
47,
*Nset, nset=c15
37,
*Nset, nset=c16
27,
*Nset, nset=c17
18,
*Nset, nset=c18
10,
*Nset, nset=c19
3,
*Boundary
N3, 1, 1
N3, 2, 2
*Step, name=Step-1, nlgeom=NO
*Static
1., 1., 1e-05, 1.

*Cload
c1,2,-1.378737e+003,
*Cload
c2,2,-2.737047e+003,
*Cload
c3,2,-2.697824e+003,
*Cload
c4,2,-2.667471e+003,
*Cload
c5,2,-2.652479e+003,
*Cload
c6,2,-2.651450e+003,
*Cload
c7,2,-2.661497e+003,
*Cload
c8,2,-2.681952e+003,
*Cload
c9,2,-2.713947e+003,
*Cload
c10,2,-2.713073e+003,
*Cload
c11,2,-2.690770e+003,
*Cload
c12,2,-2.704389e+003,
*Cload
c13,2,-2.740639e+003,
*Cload
c14,2,-2.866262e+003,
*Cload
c15,2,-3.146015e+003,
*Cload
c16,2,-3.259349e+003,
*Cload
c17,2,-2.945724e+003,
*Cload
c18,2,-2.719006e+003,
*Cload
c19,2,-1.372368e+003,
*Restart, write, frequency=0
*Output, field
*Node Output
U
*Output, history
*Energy Output
ALLSE,
*End Step
