*Node
1,-0.000000,1.000000
2,0.047514,1.000000
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*User element, nodes=4,type=U4, properties=3,coordinates=2, variables=800
1,2
*Element, type=U4
64,63,98,97,81
79,226,227,180,179
129,60,59,58,39
136,652,654,650,649
150,4,3,2,1
204,479,509,508,478
*User element, nodes=5,type=U5, properties=3,coordinates=2, variables=800
1,2
*Element, type=U5
11,410,409,408,375,376
16,62,95,94,93,61
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*User element, nodes=6,type=U6, properties=3,coordinates=2, variables=800
1,2
*Element, type=U6
1,383,385,381,350,348,349
3,204,206,205,202,182,159
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*User element, nodes=7,type=U7, properties=3,coordinates=2, variables=800
1,2
*Element, type=U7
2,397,427,428,423,394,396,395
13,59,92,91,88,56,57,58
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*Elset, elset=E1,generate
1,326,1
*Nset, nset=Node, generate
1,655,1
*Uel property, elset=E1
1.0E5,0.25
*Nset, nset=BottomEdge
445,479,509,536,560,581,600,616,629,640,648,653,655,
*Nset, nset=LeftEdge
1,4,10,11,23,38,39,60,61,62,63,80,81,

*Nset, nset=c1
655,
*Nset, nset=c2
654,
*Nset, nset=c3
650,
*Nset, nset=c4
643,
*Nset, nset=c5
633,
*Nset, nset=c6
620,
*Nset, nset=c7
604,
*Nset, nset=c8
585,
*Nset, nset=c9
564,
*Nset, nset=c10
540,
*Nset, nset=c11
513,
*Nset, nset=c12
483,
*Nset, nset=c13
449,
*Nset, nset=c14
414,
*Nset, nset=c15
380,
*Nset, nset=c16
344,
*Nset, nset=c17
307,
*Nset, nset=c18
269,
*Nset, nset=c19
227,
*Nset, nset=c20
180,
*Boundary
LeftEdge, 1, 1
BottomEdge, 2, 2
*Step, name=Step-1, nlgeom=NO
*Static
1., 1., 1e-05, 1.
*Cload
c1,1,2.219542e+001,
*Cload
c2,1,5.053447e+001,
*Cload
c3,1,5.189529e+001,
*Cload
c4,1,5.226824e+001,
*Cload
c5,1,5.465208e+001,
*Cload
c6,1,5.199459e+001,
*Cload
c7,1,5.230933e+001,
*Cload
c8,1,5.256354e+001,
*Cload
c9,1,5.294453e+001,
*Cload
c10,1,5.370018e+001,
*Cload
c11,1,5.402841e+001,
*Cload
c12,1,5.373462e+001,
*Cload
c13,1,5.372840e+001,
*Cload
c14,1,5.399166e+001,
*Cload
c15,1,5.277261e+001,
*Cload
c16,1,5.062826e+001,
*Cload
c17,1,5.426292e+001,
*Cload
c18,1,5.372482e+001,
*Cload
c19,1,5.121101e+001,
*Cload
c20,1,2.685963e+001,
*Restart, write, frequency=0
*Output, field
*Node Output
U
*Output, history
*Energy Output
ALLSE,
*End Step
