** Job name: Job-1 Model name: Model-3
** Generated by: Abaqus/CAE 6.14-1
**
** PARTS
**
*Node
      1,  0.368421048,           1.
      2,           0.,           1.
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*User element, nodes=4,type=U4, properties=3,coordinates=2, variables=800
1,2
*Element, type=U4
  1,   1,  12, 114,  45
  2,  12,  13, 115, 114
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*Nset, nset=N1, generate
   1,  366,    1
*Elset, elset=E1, generate
   1,  326,    1
*Uel property, elset=E1
1.0E5,0.25
*Nset, nset=R1
  9, 11
*Nset, nset=R2
  10,  75,  76,  77,  78,  79
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** Section: Section-1-_PICKEDSET2
**
**
** ASSEMBLY
**
**
*Nset, nset=Set-1
   1,   2,  11,  12,  13,  14
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*Nset, nset=Set-3
  2,  3,  5, 18, 19, 20, 21, 22, 23, 24, 25, 26, 27, 28
*Elset, elset=Set-3
  7, 14, 21, 28, 35, 42, 49, 56, 63, 70, 77, 84, 85
*Nset, nset=Set-4
  7,  8,  9, 64, 65, 66, 67, 68, 69, 70, 71, 72, 73, 74
** BOUNDARY CONDITIONS
**
** Name: BC-1 Type: Displacement/Rotation
*Boundary
Set-3, 1, 1
** Name: BC-2 Type: Displacement/Rotation
*Boundary
Set-4, 2, 2
** ----------------------------------------------------------------
**
** STEP: Step-1
**
*Step, name=Step-1, nlgeom=NO
*Static
1., 1., 1e-05, 1.
**
** LOADS
**
** Name: Load-1   Type: Pressure
*Cload
R1, 1, 26.316
R2, 1, 52.632
**
** OUTPUT REQUESTS
**
*Restart, write, frequency=0
*Output, field
*Node Output
U
*Output, history
*Energy Output
ALLSE,
*End Step
