** PARTS
**
*Node
      1,           0.,           1.
      2, 0.0825793445,  0.996584475
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*User element, nodes=4,type=U4, properties=3,coordinates=2, variables=800
1,2
*Element, type=U4
  1,   1,   2,  22,  21
  2,   2,   3,  23,  22
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*Nset, nset=N1, generate
   1,  180,    1
*Elset, elset=E1, generate
   1,  152,    1
*Nset, nset=Bottom, generate
  20,  180,   20
*Nset, nset=Left, generate
   1,  161,   20
*Uel property, elset=E1
1.0E5,0.3
** Section: Section-1
**
** BOUNDARY CONDITIONS
**
** Name: BC-1 Type: Displacement/Rotation
*Nset, nset=c1
1,
*Nset, nset=c2
2,
*Nset, nset=c3
3,
*Nset, nset=c4
4,
*Nset, nset=c5
5,
*Nset, nset=c6
6,
*Nset, nset=c7
7,
*Nset, nset=c8
8,
*Nset, nset=c9
9,
*Nset, nset=c10
10,
*Nset, nset=c11
11,
*Nset, nset=c12
12,
*Nset, nset=c13
13,
*Nset, nset=c14
14,
*Nset, nset=c15
15,
*Nset, nset=c16
16,
*Nset, nset=c17
17,
*Nset, nset=c18
18,
*Nset, nset=c19
19,
*Nset, nset=c20
20,
*Boundary
Left, 1, 1
** Name: BC-2 Type: Displacement/Rotation
*Boundary
Bottom, 2, 2
** ----------------------------------------------------------------
**
** STEP: Step-1
**
*Step, name=Step-1, nlgeom=NO
*Static
1., 1., 1e-05, 1.
*Cload
c1,1,1.13753275873,
*Cload
c2,1,6.81741814978,
*Cload
c3,1,13.5882408203,
*Cload
c4,1,20.2662576886,
*Cload
c5,1,26.8058431162,
*Cload
c6,1,33.1623063636,
*Cload
c7,1,39.2922355424,
*Cload
c8,1,45.1537655611,
*Cload
c9,1,50.7068564009,
*Cload
c10,1,55.9135683134,
*Cload
c11,1,60.738327259,
*Cload
c12,1,65.1481729129,
*Cload
c13,1,69.1129854184,
*Cload
c14,1,72.6056923009,
*Cload
c15,1,75.6024444524,
*Cload
c16,1,78.0827527368,
*Cload
c17,1,80.0296647428,
*Cload
c18,1,81.4298940499,
*Cload
c19,1,82.2738793912,
*Cload
c20,1,41.2779255615,
*Cload
c1,2,41.2779253129,
*Cload
c2,2,82.2738786923,
*Cload
c3,2,81.4298952598,
*Cload
c4,2,80.0296659768,
*Cload
c5,2,78.0827524491,
*Cload
c6,2,75.6024445501,
*Cload
c7,2,72.6056916542,
*Cload
c8,2,69.1129849136,
*Cload
c9,2,65.1481725266,
*Cload
c10,2,60.7383265125,
*Cload
c11,2,55.9135675187,
*Cload
c12,2,50.7068559141,
*Cload
c13,2,45.1537647449,
*Cload
c14,2,39.2922344176,
*Cload
c15,2,33.1623065536,
*Cload
c16,2,26.8058424957,
*Cload
c17,2,20.2662633401,
*Cload
c18,2,13.5882459954,
*Cload
c19,2,6.81740792058,
*Cload
c20,2,1.1375297588,
**
** LOADS
**
** Name: Load-1   Type: Pressure
*Restart, write, frequency=0
*Output, field
*Node Output
U
*Output, history
*Energy Output
ALLSE,
*End Step
